// SBML level 3 version 1

model main()
  // model units - substance: mole, time: second, extent: mole

  // Compartments:
  compartment c1 = 1 litre;
  compartment comp1 = 1e-15 litre;

  // Species:
  species _3OC6HSL in comp1 = 0;
  species GFP in comp1 = 0;

  // Parameters:
  alpha = 996868.4 molar_per_second;
  b = 25299.07 molar_per_second;
  K = 6.4609e-9 molar;
  n = 2.836491 dimensionless;
  beta = 1 per_second;

  // Rate rules:
  GFP' = (K^n*b + _3OC6HSL^n*alpha)/(K^n + _3OC6HSL^n) - beta*GFP;

  // Unit definitions:
  unit per_second = 1 / second;
  unit molar_per_second = mole / (litre * second);
  unit molar = mole / litre;
end
